// TESS system response to 100MW loss of generation

#set suppress_repeat_messages=FALSE

#define NOISE=1
#define RAMP=0

#define POWER_MARKET=yes
#define POWER_AVG=50
#define POWER_STD=10

#define ENERGY_MARKET=no
#define ENERGY_AVG=50
#define ENERGY_STD=10

#define RAMP_MARKET=no
#define RAMP_AVG=0
#define RAMP_STD=10

#include "system.glm"
