// this file is used if local.glm is not found
#define TIMEZONE=${TIMEZONE:-US/CA/Los Angeles}
#define WEATHER=${WEATHER:-722540TYA.tmy3}
#define STARTTIME=${STARTTIME:-2021-03-23 00:00:00}
#define STOPTIME=${STOPTIME:-2021-03-24 00:00:00}
